// SBML level 2 version 4

model Goldbeter1990_CalciumSpike_CICR()
  // This model is automatically converted from the Model BIOMD0000000098 by using libsbml. According to the terms of use, this generated model is not related with Model BIOMD0000000098 any more.
  // biomodels.db:BIOMD0000000098
  // biomodels.db:MODEL4519937652
  // isDescribedBy pubmed:2304911
  // isVersionOf GO:0005220 GO:0006816

  // Compartments:
  compartment cytosol = 1;  // GO:0005829
  compartment store = 1;  // GO:0005783

  // Species:
  species Z in cytosol = 0.15;  // CHEBI:29108 kegg.compound:C00076
  species Y in store = 1.6;  // CHEBI:29108 kegg.compound:C00076

  // Parameters:
  v0 = 1 uM_per_sec;
  v1 = 7.3 uM_per_sec;
  beta = 0.301 dimensionless;
  Vm2 = 65 uM_per_sec;
  n = 2 dimensionless;
  K2 = 1 uM;
  Vm3 = 500 uM_per_sec;
  m = 2 dimensionless;
  Kr = 2 uM;
  Ka = 0.9 uM;
  kf = 1 sec_inv;
  k = 10 sec_inv;
  p = 4 dimensionless;

  // Reactions:
  Ca_influx: => Z; cytosol*v0;  // GO:0006816
  InsP3_dependent_Ca_influx: => Z; cytosol*v1*beta;  // GO:0005220
  ATP_driven_Ca_pumping_into_store: Z => Y; cytosol*(Vm2*Z^n/(K2^n + Z^n));  // GO:0032470
  ATP_driven_pumping_into_cytosol: Y => Z; store*(Vm3*Y^m*Z^p/((Kr^m + Y^m)*(Ka^p + Z^p)));  // GO:0007204 GO:0048763
  Rf: Y => Z; store*kf*Y; Rf is "Ca leak";  // GO:0007204
  R_eff: Z => ; cytosol*k*Z; R_eff is "Ca efflux";  // GO:0006816

  // Unit definitions:
  unit substance = 1e-6 mole; substance is "micromole";
  unit uM_per_sec = 1e-6 mole / (litre * second);
  unit sec_inv = 1 / second;
  unit uM = 1e-6 mole / litre;
end
